// SBML level 3 version 1

model __main()

  // Compartments:
  compartment default_compartment = 1;

  // Species:
  species rcDNA in default_compartment = 0;
  species cccDNA in default_compartment = 1;
  species envelope in default_compartment = 0;
  species virus in default_compartment;

  // Parameters:
  k1 = 1;
  k2 = 0.025;
  k3 = 1000;
  k4 = 0.25;
  k5 = 2;
  k6 = 7.5e-6;

  // Reactions:
  J1: -> rcDNA; k1*cccDNA;  // modifiers: cccDNA
  _J0: rcDNA -> cccDNA; k2*rcDNA;
  J3: -> envelope; k3*cccDNA;  // modifiers: cccDNA
  _J1: cccDNA -> ; k4*cccDNA;
  _J2: envelope -> ; k5*envelope;
  _J3: rcDNA + envelope -> virus; k6*rcDNA*envelope;
end
